// SBML level 3 version 1

model antimony_repressilator()

  // Compartments:
  compartment default_compartment = 1;
  compartment cell = 1;  // SBO:0000290 GO:0005623

  // Species:
  species PX in default_compartment = 0;  // SBO:0000252 uniprot:P03023
  species PY in default_compartment = 0;  // SBO:0000252 uniprot:P04483
  species PZ in default_compartment = 0;  // SBO:0000252 uniprot:P03034
  species X in default_compartment = 0;  // SBO:0000250 CHEBI:33699 kegg.compound:C00046 uniprot:P03023
  species Y in default_compartment = 20;  // SBO:0000250 CHEBI:33699 kegg.compound:C00046 uniprot:P04483
  species Z in default_compartment = 0;  // SBO:0000250 CHEBI:33699 kegg.compound:C00046 uniprot:P03034

  // Parameters:
  eff = 20;
  n = 2;
  KM = 40;
  tau_mRNA = 2;  // SBO:0000356
  tau_prot = 10;
  ps_a = 0.5;
  ps_0 = 0.0005;

  // Assignment rules:
  beta := tau_mRNA/tau_prot;
  alpha0 := a0_tr*eff*tau_prot/(ln(2)*KM);
  alpha := a_tr*eff*tau_prot/(ln(2)*KM);
  t_ave := tau_mRNA/ln(2);
  k_tl := eff/t_ave;
  a_tr := (ps_a - ps_0)*60;
  a0_tr := ps_0*60;
  kd_prot := ln(2)/tau_prot;
  kd_mRNA := ln(2)/tau_mRNA;

  // Reactions:
  _J0: X -> ; kd_mRNA*X;  // SBO:0000179 GO:0006402
  _J1: Y -> ; kd_mRNA*Y;  // SBO:0000179 GO:0006402
  _J2: Z -> ; kd_mRNA*Z;  // SBO:0000179 GO:0006402
  _J3: -> PX; k_tl*X;  // modifiers: X; SBO:0000184 GO:0006412
  _J4: -> PY; k_tl*Y;  // modifiers: Y; SBO:0000184 GO:0006412
  _J5: -> PZ; k_tl*Z;  // modifiers: Z; SBO:0000184 GO:0006412
  _J6: PX -> ; kd_prot*PX;  // SBO:0000179 GO:0030163
  _J7: PY -> ; kd_prot*PY;  // SBO:0000179 GO:0030163
  _J8: PZ -> ; kd_prot*PZ;  // SBO:0000179 GO:0030163
  _J9: -> X; a0_tr + a_tr*KM^n/(KM^n + PZ^n);  // modifiers: PZ; SBO:0000183 GO:0006351
  _J10: -> Y; a0_tr + a_tr*KM^n/(KM^n + PX^n);  // modifiers: PX; SBO:0000183 GO:0006351
  _J11: -> Z; a0_tr + a_tr*KM^n/(KM^n + PY^n);  // modifiers: PY; SBO:0000184 GO:0006351
end
