// SBML level 3 version 2

model main()

  // Compartments:
  compartment cell = 1;

  // Species:
  substanceOnly species PX in cell = 0; PX is "LacI protein";
  substanceOnly species PY in cell = 0; PY is "TetR protein";
  substanceOnly species PZ in cell = 0; PZ is "cI protein";  // uniprot:P03034
  substanceOnly species X in cell = 0; X is "Lacl mRNA";
  substanceOnly species Y in cell = 20; Y is "TetR mRNA";
  substanceOnly species Z in cell = 0; Z is "cl mRNA";

  // Parameters:
  tau_mRNA = 2; tau_mRNA is "mRNA half life";
  eff = 20; eff is "translation efficiency";
  var t_ave; t_ave is "average mRNA life time";
  tau_prot = 10; tau_prot is "protien half life";
  ps_0 = 0.0005; ps_0 is "tps_repr";
  ps_a = 0.5; ps_a is "tps_active";
  KM = 40;
  n = 2;

  // Assignment rules:
  kd_mRNA := ln(2)/tau_mRNA;
  t_ave := tau_mRNA/ln(2);
  k_tl := eff/t_ave;
  kd_prot := ln(2)/tau_prot;
  a0_tr := ps_0*60;
  a_tr := (ps_a - ps_0)*60;

  // Reactions:
  degradation_of_LacI_transcripts: X => ; kd_mRNA*X;
  degradation_of_TetR_transcripts: Y => ; kd_mRNA*Y;
  degradation_of_CI_transcripts: Z => ; kd_mRNA*Z;
  translation_of_LacI: => PX; k_tl*X;  // modifiers: X
  translation_of_TetR: => PY; k_tl*Y;  // modifiers: Y
  translation_of_CI: => PZ; k_tl*Z;  // modifiers: Z
  degradation_of_LacI: PX => ; kd_prot*PX;
  degradation_of_TetR: PY => ; kd_prot*PY;
  degradation_of_CI: PZ => ; kd_prot*PZ;
  transcription_of_LacI: => X; a0_tr + a_tr*KM^n/(KM^n + PZ^n);  // modifiers: PZ
  transcription_of_TetR: => Y; a0_tr + a_tr*KM^n/(KM^n + PX^n);  // modifiers: PX
  transcription_of_CI: => Z; a0_tr + a_tr*KM^n/(KM^n + PY^n);  // modifiers: PY
end
