// SBML level 2 version 3

model main()

  // Compartments:
  compartment cell = 1;

  // Species:
  substanceOnly species PX in cell = 0; PX is "LacI protein";
  substanceOnly species PY in cell = 0; PY is "TetR protein";
  substanceOnly species PZ in cell = 0; PZ is "cI protein";
  substanceOnly species X in cell = 0; X is "Lacl mRNA";
  substanceOnly species Y in cell = 20; Y is "TetR mRNA";
  substanceOnly species Z in cell = 0; Z is "cl mRNA";

  // Parameters:
  tau_mRNA = 2; tau_mRNA is "mRNA half life";
  kd_mRNA = ;

  // Assignment rules:
  kd_MRNA := ln(2)/tau_mRNA;

  // Reactions:
  degradation_of_LacI_transcripts: X => ; kd_mRNA*X;
  transcription_of_LacI: => X; ;  // modifiers: PZ
end
